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/BATCH
/COM,ANSYS RELEASE 2020 R1           BUILD 20.1      UP20191203       12:24:08
/input,menust,tmp,''
/COM,ANSYS RELEASE 2020 R1           BUILD 20.1      UP20191203       12:24:09
/GST,ON
/PLO,INFO,3
/GRO,CURL,ON
/CPLANE,1
WPSTYLE,,,,,,,,0
/POST1
PLLS,LS1,LS6,1,0,0
FINISH
/PREP7
/RGB,INDEX,100,100,100, 0
/RGB,INDEX, 80, 80, 80,13
/RGB,INDEX, 60, 60, 60,14
/RGB,INDEX, 0, 0, 0,15
! PLLS,LS1,LS6,1,0,0
/RGB,INDEX, 0, 0, 0, 0
/RGB,INDEX, 60, 60, 60,13
/RGB,INDEX, 80, 80, 80,14
/RGB,INDEX,100,100,100,15
! PLLS,LS1,LS6,1,0,0
GPLOT
/RGB,INDEX,100,100,100, 0
/RGB,INDEX, 80, 80, 80,13
/RGB,INDEX, 60, 60, 60,14
/RGB,INDEX, 0, 0, 0,15
R,50,1.76715,0.2485,0.2485,1.5,1.5, ,
RMORE, ,0.49701, , , , ,
FLST,2,28,4,ORDE,28
FITEM,2,236
FITEM,2,-237
FITEM,2,255
FITEM,2,273
FITEM,2,-274
FITEM,2,292
FITEM,2,310
FITEM,2,-311
FITEM,2,329
FITEM,2,347
FITEM,2,-348
FITEM,2,366
FITEM,2,384
FITEM,2,-385
FITEM,2,403
FITEM,2,421
FITEM,2,-422
FITEM,2,440
FITEM,2,458
FITEM,2,-459
FITEM,2,477
FITEM,2,495
FITEM,2,-496
FITEM,2,514
FITEM,2,532
FITEM,2,-533
FITEM,2,551
FITEM,2,588
LCLEAR,P51X
FLST,5,28,4,ORDE,28
FITEM,5,236
FITEM,5,-237
FITEM,5,255
FITEM,5,273
FITEM,5,-274
FITEM,5,292
FITEM,5,310
FITEM,5,-311
FITEM,5,329
FITEM,5,347
FITEM,5,-348
FITEM,5,366
FITEM,5,384
FITEM,5,-385
FITEM,5,403
FITEM,5,421
FITEM,5,-422
FITEM,5,440
FITEM,5,458
FITEM,5,-459
FITEM,5,477
FITEM,5,495
FITEM,5,-496
FITEM,5,514
FITEM,5,532
FITEM,5,-533
FITEM,5,551
FITEM,5,588
CM,_Y,LINE
LSEL, , , ,P51X
CM,_Y1,LINE
CMSEL,S,_Y
CMSEL,S,_Y1
LATT,1,50,1, , , ,
CMSEL,S,_Y
CMDELE,_Y
CMDELE,_Y1
FLST,5,28,4,ORDE,28
FITEM,5,236
FITEM,5,-237
FITEM,5,255
FITEM,5,273
FITEM,5,-274
FITEM,5,292
FITEM,5,310
FITEM,5,-311
FITEM,5,329
FITEM,5,347
FITEM,5,-348
FITEM,5,366
FITEM,5,384
FITEM,5,-385
FITEM,5,403
FITEM,5,421
FITEM,5,-422
FITEM,5,440
FITEM,5,458
FITEM,5,-459
FITEM,5,477
FITEM,5,495
FITEM,5,-496
FITEM,5,514
FITEM,5,532
FITEM,5,-533
FITEM,5,551
FITEM,5,588
CM,_Y,LINE
LSEL, , , ,P51X
CM,_Y1,LINE
CMSEL,,_Y
LESIZE,_Y1, , ,1, , , , ,1
FLST,2,28,4,ORDE,28
FITEM,2,236
FITEM,2,-237
FITEM,2,255
FITEM,2,273
FITEM,2,-274
FITEM,2,292
FITEM,2,310
FITEM,2,-311
FITEM,2,329
FITEM,2,347
FITEM,2,-348
FITEM,2,366
FITEM,2,384
FITEM,2,-385
FITEM,2,403
FITEM,2,421
FITEM,2,-422
FITEM,2,440
FITEM,2,458
FITEM,2,-459
FITEM,2,477
FITEM,2,495
FITEM,2,-496
FITEM,2,514
FITEM,2,532
FITEM,2,-533
FITEM,2,551
FITEM,2,588
LMESH,P51X
/PSF,DEFA, ,1,0,1
/PBF,DEFA, ,1
/PSYMB,CS,0
/PSYMB,NDIR,0
/PSYMB,ESYS,0
/PSYMB,LDIV,0
/PSYMB,LDIR,0
/PSYMB,ADIR,0
/PSYMB,ECON,0
/PSYMB,XNODE,0
/PSYMB,DOT,1
/PSYMB,PCONV,
/PSYMB,LAYR,0
/PSYMB,FBCS,0
/PBC,U, ,0,,,,
/PBC,ROT, ,0,,,,
/PBC,F, ,1,,,,
/PBC,M, ,0,,,,
/PBC,NFOR, ,0,,,,
/PBC,NMOM, ,0,,,,
/PBC,RFOR, ,0,,,,
/PBC,RMOM, ,0,,,,
/PBC,PATH, ,0,,,,
FLST,2,399,1,ORDE,24
FITEM,2,1
FITEM,2,-19
FITEM,2,40
FITEM,2,-148
FITEM,2,150
FITEM,2,-167
FITEM,2,169
FITEM,2,-186
FITEM,2,188
FITEM,2,-205
FITEM,2,207
FITEM,2,-224
FITEM,2,226
FITEM,2,-243
FITEM,2,245
FITEM,2,-262
FITEM,2,264
FITEM,2,-281
FITEM,2,283
FITEM,2,-300
FITEM,2,302
FITEM,2,-419
FITEM,2,1513
FITEM,2,-1521
NROTAT,P51X
FLST,2,9,1,ORDE,2
FITEM,2,1513
FITEM,2,-1521
/GO
F,P51X,FX,61
ALLSEL,ALL
FINISH
/SOL
/STATUS,SOLU
SOLVE
FINISH
/POST1
ETABLE,REFL
PLLS,LS1,LS6,0.2,0,0
/EFACET,1
PLNSOL, U,Y, 0,1.0
/NUMBER,0
LSEL,S,LOC,Y,0,90
ALLSEL,BELOW,LINE
PRETAB,LS1,LS2,LS7,LS4,LS9,SMIS4
SAVE
FINISH
/PREP7
R,40,2.54469,0.5153,0.5153,1.8,1.8, ,
RMORE, ,1.0306, , , , ,
R,30,3.4636,0.9546,0.9546,2.1,2.1, ,
RMORE, ,1.90931, , , , ,
R,20,4.5239,1.6286,1.6286,2.4,2.4, ,
RMORE, ,3.2572, , , , ,
R,10,5.7255,2.6087,2.6087,2.7,2.7, ,
RMORE, ,5.2174, , , , ,
SAVE
FINISH
/POST1
ALLSEL,ALL
/PSF,DEFA, ,1,0,1
/PBF,DEFA, ,1
/PSYMB,CS,0
/PSYMB,NDIR,0
/PSYMB,ESYS,0
/PSYMB,LDIV,0
/PSYMB,LDIR,0
/PSYMB,ADIR,0
/PSYMB,ECON,0
/PSYMB,XNODE,0
/PSYMB,DOT,1
/PSYMB,PCONV,
/PSYMB,LAYR,0
/PSYMB,FBCS,0
/PBC,U, ,0,,,,
/PBC,ROT, ,0,,,,
/PBC,F, ,1,,,,
/PBC,M, ,0,,,,
/PBC,NFOR, ,0,,,,
/PBC,NMOM, ,0,,,,
/PBC,RFOR, ,0,,,,
/PBC,RMOM, ,0,,,,
/PBC,PATH, ,0,,,,
/EFACET,1
PLNSOL, U,Y, 0,1.0
FINISH
/PREP7
FINISH
/SOL
FINISH
/POST1
/PSF,DEFA, ,1,0,1
/PBF,DEFA, ,1
/PSYMB,CS,0
/PSYMB,NDIR,0
/PSYMB,ESYS,0
/PSYMB,LDIV,0
/PSYMB,LDIR,0
/PSYMB,ADIR,0
/PSYMB,ECON,0
/PSYMB,XNODE,0
/PSYMB,DOT,1
/PSYMB,PCONV,
/PSYMB,LAYR,0
/PSYMB,FBCS,0
/PBC,ALL,,1
/PBC,NFOR,,0
/PBC,NMOM,,0
/PBC,RFOR,,0
/PBC,RMOM,,0
/PBC,PATH,,0
FINISH
/PREP7
SBCTRAN
FINISH
/SOL
/STATUS,SOLU
SOLVE
FINISH
/POST1
ETABLE,REFL
PLLS,LS1,LS6,0.2,0,0
SAVE
SAVE,'corrosion_40proc','db','C:\Users\bulol\Desktop\D2DE~1\ANSYS~1\81EC~1\40%\'
SAVE
FINISH
! /EXIT,NOSAV
/BATCH
/COM,ANSYS RELEASE 2020 R1           BUILD 20.1      UP20191203       15:41:30
/input,menust,tmp,''
/COM,ANSYS RELEASE 2020 R1           BUILD 20.1      UP20191203       15:41:30
/GST,ON
/PLO,INFO,3
/GRO,CURL,ON
/CPLANE,1
WPSTYLE,,,,,,,,0
GPLOT
/POST1
PLLS,LS1,LS6,1,0,0
/RGB,INDEX,100,100,100, 0
/RGB,INDEX, 80, 80, 80,13
/RGB,INDEX, 60, 60, 60,14
/RGB,INDEX, 0, 0, 0,15
/NUMBER,2
LSEL,S,LOC,Y,0,90
ALLSEL,BELOW,LINE
GPLOT
/NUMBER,2
FINISH
! /EXIT,NOSAV
/BATCH
/COM,ANSYS RELEASE 2020 R1           BUILD 20.1      UP20191203       19:30:05
/input,menust,tmp,''
/COM,ANSYS RELEASE 2020 R1           BUILD 20.1      UP20191203       19:30:06
/GST,ON
/PLO,INFO,3
/GRO,CURL,ON
/CPLANE,1
WPSTYLE,,,,,,,,0
GPLOT
/RGB,INDEX,100,100,100, 0
/RGB,INDEX, 80, 80, 80,13
/RGB,INDEX, 60, 60, 60,14
/RGB,INDEX, 0, 0, 0,15
/POST1
PLLS,LS1,LS6,0.3,0,0
/NUMBER,2
LSEL,S,LOC,Y,0,90
ALLSEL,BELOW,LINE
/CONT,1,16,AUTO
PLLS,LS2,LS7,0.3,0,0
PLLS,LS2,LS7,0.5,0,0
PLLS,LS2,LS7,0.8,0,0
ALLSEL,ALL
LSEL,S,LOC,Y,0,90
ALLSEL,BELOW,LINE
PLLS,LS2,LS7,0.8,0,0
SAVE
FINISH
! /EXIT,NOSAV
