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/BATCH
/COM,ANSYS RELEASE 2020 R1           BUILD 20.1      UP20191203       01:50:32
/input,menust,tmp,''
/COM,ANSYS RELEASE 2020 R1           BUILD 20.1      UP20191203       01:50:32
/GST,ON
/PLO,INFO,3
/GRO,CURL,ON
/CPLANE,1
WPSTYLE,,,,,,,,0
GPLOT
/RGB,INDEX,100,100,100, 0
/RGB,INDEX, 80, 80, 80,13
/RGB,INDEX, 60, 60, 60,14
/RGB,INDEX, 0, 0, 0,15
WPSTYLE,,,,,,,,1
FLST,2,1,8
FITEM,2,0.707066370655,0.842648887431,0
WPAVE,P51X
WPSTYL, STAT
FLST,3,3,8
FITEM,3,-0.128557521938,-0.153208888624,0
FITEM,3,2.72498521628,6.38683535007,0
FITEM,3,5.81661625298,3.79264888743,0
WPLANE,-1,P51X
WPAVE,0,0,0
CSYS,0
WPAVE,0,0,0
CSYS,1
CSYS,1
WPSTYLE,,,,,,,,0
WPSTYLE,,,,,,,,1
WPCSYS,-1
wpoff,0,0,-51
/PREP7
LCLEAR,     360
/GTYPE,1,KEYP,0
/GTYPE,1,LINE,1
/GTYPE,1,AREA,0
/GTYPE,1,VOLU,0
/GTYPE,1,NODE,1
/GTYPE,1,ELEM,1
/GCMD,1
GPLOT
LSBW,     360
GPLOT
LPLOT
KPLOT
/GTYPE,1,KEYP,1
/GTYPE,1,LINE,1
/GTYPE,1,AREA,0
/GTYPE,1,VOLU,0
/GTYPE,1,NODE,0
/GTYPE,1,ELEM,0
/GCMD,1
GPLOT
wpoff,0,0,-0.2
LSBW,    2953
LDELE,     360, , ,1
FLST,5,2,4,ORDE,2
FITEM,5,342
FITEM,5,2956
CM,_Y,LINE
LSEL, , , ,P51X
CM,_Y1,LINE
CMSEL,S,_Y
CMSEL,S,_Y1
LATT,1,1,1, , , ,
CMSEL,S,_Y
CMDELE,_Y
CMDELE,_Y1
FLST,5,2,4,ORDE,2
FITEM,5,342
FITEM,5,2956
CM,_Y,LINE
LSEL, , , ,P51X
CM,_Y1,LINE
CMSEL,,_Y
LESIZE,_Y1, , ,1, , , , ,1
FLST,2,2,4,ORDE,2
FITEM,2,342
FITEM,2,2956
LMESH,P51X
GPLOT
/PSF,DEFA, ,1,0,1
/PBF,DEFA, ,1
/PSYMB,CS,0
/PSYMB,NDIR,0
/PSYMB,ESYS,0
/PSYMB,LDIV,0
/PSYMB,LDIR,0
/PSYMB,ADIR,0
/PSYMB,ECON,0
/PSYMB,XNODE,0
/PSYMB,DOT,1
/PSYMB,PCONV,
/PSYMB,LAYR,0
/PSYMB,FBCS,0
/PBC,U, ,0,,,,
/PBC,ROT, ,0,,,,
/PBC,F, ,2,,,,
/PBC,M, ,0,,,,
/PBC,NFOR, ,0,,,,
/PBC,NMOM, ,0,,,,
/PBC,RFOR, ,0,,,,
/PBC,RMOM, ,0,,,,
/PBC,PATH, ,0,,,,
/GTYPE,1,KEYP,0
/GTYPE,1,LINE,0
/GTYPE,1,AREA,0
/GTYPE,1,VOLU,0
/GTYPE,1,NODE,1
/GTYPE,1,ELEM,1
/GCMD,1
GPLOT
SAVE
ALLSEL,ALL
FINISH
/SOL
/STATUS,SOLU
SOLVE
FINISH
/POST1
ETABLE,REFL
/EFACET,1
PLNSOL, U,SUM, 0,1.0
/NUMBER,1
PLLS,LS1,LS6,1,0,0
/NUMBER,2
PLLS,LS1,LS6,0.5,0,0
PLLS,LS1,LS6,0.2,0,0
/EFACET,1
PLNSOL, U,SUM, 0,1.0
/NUMBER,0
PLLS,LS1,LS6,0.2,0,0
PLLS,LS2,LS7,0.2,0,0
SAVE
FINISH
! /EXIT,NOSAV
/BATCH
/COM,ANSYS RELEASE 2020 R1           BUILD 20.1      UP20191203       22:48:13
/input,menust,tmp,''
/COM,ANSYS RELEASE 2020 R1           BUILD 20.1      UP20191203       22:48:13
/GST,ON
/PLO,INFO,3
/GRO,CURL,ON
/CPLANE,1
WPSTYLE,,,,,,,,0
GPLOT
/RGB,INDEX,100,100,100, 0
/RGB,INDEX, 80, 80, 80,13
/RGB,INDEX, 60, 60, 60,14
/RGB,INDEX, 0, 0, 0,15
/POST1
/EFACET,1
PLNSOL, U,SUM, 0,1.0
PRETAB,LS1,LS2,LS7,LS4,LS9,SMIS4
LSEL,S,LOC,Y,0,90
ALLSEL,BELOW,LINE
PRETAB,LS1,LS2,LS7,LS4,LS9,SMIS4
/NUMBER,0
GPLOT
/EFACET,1
PLNSOL, U,SUM, 0,1.0
PLLS,LS1,LS6,0.4,0,0
/NUMBER,2
PLLS,LS1,LS6,0.2,0,0
/NUMBER,2
PLLS,LS2,LS7,0.2,0,0
PLLS,LS2,LS7,0.4,0,0
/PSF,DEFA, ,1,0,1
/PBF,DEFA, ,1
/PSYMB,CS,0
/PSYMB,NDIR,0
/PSYMB,ESYS,0
/PSYMB,LDIV,0
/PSYMB,LDIR,0
/PSYMB,ADIR,0
/PSYMB,ECON,0
/PSYMB,XNODE,0
/PSYMB,DOT,1
/PSYMB,PCONV,
/PSYMB,LAYR,0
/PSYMB,FBCS,0
/PBC,U, ,0,,,,
/PBC,ROT, ,0,,,,
/PBC,F, ,1,,,,
/PBC,M, ,0,,,,
/PBC,NFOR, ,0,,,,
/PBC,NMOM, ,0,,,,
/PBC,RFOR, ,0,,,,
/PBC,RMOM, ,0,,,,
/PBC,PATH, ,0,,,,
GPLOT
/NUMBER,0
/EFACET,1
PLNSOL, U,X, 0,1.0
/PLOPTS,INFO,3
/PLOPTS,LEG1,1
/PLOPTS,LEG2,1
/PLOPTS,LEG3,1
/PLOPTS,FRAME,1
/PLOPTS,TITLE,1
/PLOPTS,MINM,1
/PLOPTS,FILE,0
/PLOPTS,SPNO,0
/PLOPTS,LOGO,1
/PLOPTS,WINS,1
/PLOPTS,WP,0
/PLOPTS,DATE,0
/EFACET,1
PLNSOL, U,Y, 0,1.0
/NUMBER,0
/PLOPTS,INFO,3
/PLOPTS,LEG1,1
/PLOPTS,LEG2,1
/PLOPTS,LEG3,1
/PLOPTS,FRAME,1
/PLOPTS,TITLE,1
/PLOPTS,MINM,0
/PLOPTS,FILE,0
/PLOPTS,SPNO,0
/PLOPTS,LOGO,1
/PLOPTS,WINS,1
/PLOPTS,WP,0
/PLOPTS,DATE,0
/PLOPTS,INFO,3
/PLOPTS,LEG1,1
/PLOPTS,LEG2,1
/PLOPTS,LEG3,1
/PLOPTS,FRAME,1
/PLOPTS,TITLE,1
/PLOPTS,MINM,1
/PLOPTS,FILE,0
/PLOPTS,SPNO,0
/PLOPTS,LOGO,1
/PLOPTS,WINS,1
/PLOPTS,WP,0
/PLOPTS,DATE,0
/NUMBER,0
/PSF,DEFA, ,1,0,1
/PBF,DEFA, ,1
/PSYMB,CS,0
/PSYMB,NDIR,0
/PSYMB,ESYS,0
/PSYMB,LDIV,0
/PSYMB,LDIR,0
/PSYMB,ADIR,0
/PSYMB,ECON,0
/PSYMB,XNODE,0
/PSYMB,DOT,1
/PSYMB,PCONV,
/PSYMB,LAYR,0
/PSYMB,FBCS,0
/PBC,U, ,0,,,,
/PBC,ROT, ,0,,,,
/PBC,F, ,0,,,,
/PBC,M, ,0,,,,
/PBC,NFOR, ,0,,,,
/PBC,NMOM, ,0,,,,
/PBC,RFOR, ,0,,,,
/PBC,RMOM, ,0,,,,
/PBC,PATH, ,0,,,,
/EFACET,1
PLNSOL, U,X, 0,1.0
/EFACET,1
PLNSOL, U,Y, 0,1.0
GPLOT
/NUMBER,2
! /DEV,FONT,ENTITY,MENU
/dev,font,2,Courier*New,400,0,-19,0,0,,,
SAVE
FINISH
! /EXIT,NOSAV
