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/BATCH
/COM,ANSYS RELEASE 2020 R1           BUILD 20.1      UP20191203       12:17:01
/input,menust,tmp,''
/COM,ANSYS RELEASE 2020 R1           BUILD 20.1      UP20191203       12:17:01
/GST,ON
/PLO,INFO,3
/GRO,CURL,ON
/CPLANE,1
WPSTYLE,,,,,,,,0
GPLOT
LSEL,S,LOC,Y,30,55
LSEL,R,LOC,Z,-80,-40
ALLSEL,BELOW,LINE
GPLOT
/NUMBER,1
/NUMBER,2
/GTYPE,1,KEYP,1
/GTYPE,1,LINE,1
/GTYPE,1,AREA,0
/GTYPE,1,VOLU,0
/GTYPE,1,NODE,0
/GTYPE,1,ELEM,0
/GCMD,1
GPLOT
! /DEV,FONT,ENTITY,MENU
/dev,font,2,Courier*New,400,0,-11,0,0,,,
/PREP7
LCLEAR,     342
WPSTYLE,,,,,,,,1
wprot,42.5,0,0
wprot,0,90,0
SAVE
ALLSEL,ALL
FLST,2,2952,4,ORDE,2
FITEM,2,1
FITEM,2,-2952
LCLEAR,P51X
GPLOT
LSEL,S,LOC,Z,-80,-40
LSEL,R,LOC,Y,30,55
ALLSEL,BELOW,LINE
LSBW,     342
GPLOT
SAVE
CSYS,0
WPAVE,0,0,0
CSYS,1
WPAVE,0,0,0
GPLOT
WPSTYLE,,,,,,,,0
WPSTYLE,,,,,,,,1
wprot,0,0,-0.5
LSBW,    2953
LDELE,     342, , ,1
FINISH
! /EXIT,NOSAV
/BATCH
/COM,ANSYS RELEASE 2020 R1           BUILD 20.1      UP20191203       13:36:29
/input,menust,tmp,''
/COM,ANSYS RELEASE 2020 R1           BUILD 20.1      UP20191203       13:36:29
/GST,ON
/PLO,INFO,3
/GRO,CURL,ON
/CPLANE,1
WPSTYLE,,,,,,,,0
GPLOT
WPSTYLE,,,,,,,,1
wprot,0,0,-0.1
/PREP7
LSBW,    2953
FINISH
! /EXIT,NOSAV
/BATCH
/COM,ANSYS RELEASE 2020 R1           BUILD 20.1      UP20191203       13:40:48
/input,menust,tmp,''
/COM,ANSYS RELEASE 2020 R1           BUILD 20.1      UP20191203       13:40:49
/GST,ON
/PLO,INFO,3
/GRO,CURL,ON
/CPLANE,1
WPSTYLE,,,,,,,,0
GPLOT
WPSTYLE,,,,,,,,1
wprot,0,0,-0.3
/PREP7
LSBW,    2953
ALLSEL,ALL
LDELE,     342, , ,1
GPLOT
/NUMBER,2
FLST,5,2953,4,ORDE,6
FITEM,5,1
FITEM,5,-341
FITEM,5,343
FITEM,5,-2952
FITEM,5,2954
FITEM,5,-2955
CM,_Y,LINE
LSEL, , , ,P51X
CM,_Y1,LINE
CMSEL,S,_Y
CMSEL,S,_Y1
LATT,1,1,1, , , ,
CMSEL,S,_Y
CMDELE,_Y
CMDELE,_Y1
FLST,5,2953,4,ORDE,6
FITEM,5,1
FITEM,5,-341
FITEM,5,343
FITEM,5,-2952
FITEM,5,2954
FITEM,5,-2955
CM,_Y,LINE
LSEL, , , ,P51X
CM,_Y1,LINE
CMSEL,,_Y
LESIZE,_Y1, , ,1, , , , ,1
FLST,2,2953,4,ORDE,6
FITEM,2,1
FITEM,2,-341
FITEM,2,343
FITEM,2,-2952
FITEM,2,2954
FITEM,2,-2955
LMESH,P51X
WPSTYLE,,,,,,,,0
FINISH
/SOL
/STATUS,SOLU
SOLVE
/PSF,DEFA, ,1,0,1
/PBF,DEFA, ,1
/PSYMB,CS,0
/PSYMB,NDIR,0
/PSYMB,ESYS,0
/PSYMB,LDIV,0
/PSYMB,LDIR,0
/PSYMB,ADIR,0
/PSYMB,ECON,0
/PSYMB,XNODE,0
/PSYMB,DOT,1
/PSYMB,PCONV,
/PSYMB,LAYR,0
/PSYMB,FBCS,0
/PBC,U, ,1,,,,
/PBC,ROT, ,1,,,,
/PBC,F, ,1,,,,
/PBC,M, ,1,,,,
/PBC,NFOR, ,1,,,,
/PBC,NMOM, ,1,,,,
/PBC,RFOR, ,1,,,,
/PBC,RMOM, ,1,,,,
/PBC,PATH, ,1,,,,
GPLOT
/PSF,DEFA, ,1,0,1
/PBF,DEFA, ,1
/PSYMB,CS,0
/PSYMB,NDIR,0
/PSYMB,ESYS,0
/PSYMB,LDIV,0
/PSYMB,LDIR,0
/PSYMB,ADIR,0
/PSYMB,ECON,0
/PSYMB,XNODE,0
/PSYMB,DOT,1
/PSYMB,PCONV,
/PSYMB,LAYR,0
/PSYMB,FBCS,0
/PBC,ALL, ,1
/GTYPE,1,KEYP,0
/GTYPE,1,LINE,0
/GTYPE,1,AREA,0
/GTYPE,1,VOLU,0
/GTYPE,1,NODE,1
/GTYPE,1,ELEM,1
/GCMD,1
GPLOT
/GTYPE,1,KEYP,0
/GTYPE,1,LINE,0
/GTYPE,1,AREA,0
/GTYPE,1,VOLU,0
/GTYPE,1,NODE,1
/GTYPE,1,ELEM,1
/GCMD,1
/PSF,DEFA, ,1,0,1
/PBF,DEFA, ,1
/PSYMB,CS,0
/PSYMB,NDIR,0
/PSYMB,ESYS,0
/PSYMB,LDIV,0
/PSYMB,LDIR,0
/PSYMB,ADIR,0
/PSYMB,ECON,0
/PSYMB,XNODE,0
/PSYMB,DOT,1
/PSYMB,PCONV,
/PSYMB,LAYR,0
/PSYMB,FBCS,0
/PBC,ALL, ,1
FLIST, ALL
FINISH
/PREP7
SBCTRAN
GPLOT
FLST,2,1514,1,ORDE,2
FITEM,2,1
FITEM,2,-1514
/GO
F,P51X,FX,131
FLST,2,1514,1,ORDE,2
FITEM,2,1
FITEM,2,-1514
FDELE,P51X,ALL
CSYS,1
FLST,2,1514,1,ORDE,2
FITEM,2,1
FITEM,2,-1514
/GO
F,P51X,FX,131
FLST,2,1514,1,ORDE,2
FITEM,2,1
FITEM,2,-1514
FDELE,P51X,ALL
WPSTYLE,,,,,,,,1
DSYS,1
FLST,2,1514,1,ORDE,2
FITEM,2,1
FITEM,2,-1514
/GO
F,P51X,FX,131
CSYS,1
GPLOT
DSYS,0
GPLOT
WPCSYS,-1
GPLOT
FLST,2,1514,1,ORDE,2
FITEM,2,1
FITEM,2,-1514
FDELE,P51X,ALL
FLST,2,1514,1,ORDE,2
FITEM,2,1
FITEM,2,-1514
/GO
F,P51X,FX,131
CSYS,0
GPLOT
FLST,2,1514,1,ORDE,2
FITEM,2,1
FITEM,2,-1514
FDELE,P51X,ALL
SBCTRAN
CSYS,1
FLST,2,1514,1,ORDE,2
FITEM,2,1
FITEM,2,-1514
NROTAT,P51X
FLST,2,1514,1,ORDE,2
FITEM,2,1
FITEM,2,-1514
/GO
F,P51X,FX,131
GPLOT
/NUMBER,2
FLST,2,2,1,ORDE,2
FITEM,2,1513
FITEM,2,-1514
FDELE,P51X,ALL
GPLOT
/NUMBER,2
/PSF,DEFA, ,1,0,1
/PBF,DEFA, ,1
/PSYMB,CS,0
/PSYMB,NDIR,0
/PSYMB,ESYS,0
/PSYMB,LDIV,0
/PSYMB,LDIR,0
/PSYMB,ADIR,0
/PSYMB,ECON,0
/PSYMB,XNODE,0
/PSYMB,DOT,1
/PSYMB,PCONV,
/PSYMB,LAYR,0
/PSYMB,FBCS,0
/PBC,U, ,0,,,,
/PBC,ROT, ,0,,,,
/PBC,F, ,0,,,,
/PBC,M, ,0,,,,
/PBC,NFOR, ,0,,,,
/PBC,NMOM, ,0,,,,
/PBC,RFOR, ,0,,,,
/PBC,RMOM, ,0,,,,
/PBC,PATH, ,1,,,,
/PSF,DEFA, ,1,0,1
/PBF,DEFA, ,1
/PSYMB,CS,0
/PSYMB,NDIR,0
/PSYMB,ESYS,0
/PSYMB,LDIV,0
/PSYMB,LDIR,0
/PSYMB,ADIR,0
/PSYMB,ECON,0
/PSYMB,XNODE,0
/PSYMB,DOT,1
/PSYMB,PCONV,
/PSYMB,LAYR,0
/PSYMB,FBCS,0
/PBC,ALL, ,1
FINISH
/SOL
/STATUS,SOLU
SOLVE
GPLOT
/PSF,DEFA, ,1,0,1
/PBF,DEFA, ,1
/PSYMB,CS,0
/PSYMB,NDIR,0
/PSYMB,ESYS,0
/PSYMB,LDIV,0
/PSYMB,LDIR,0
/PSYMB,ADIR,0
/PSYMB,ECON,0
/PSYMB,XNODE,0
/PSYMB,DOT,1
/PSYMB,PCONV,
/PSYMB,LAYR,0
/PSYMB,FBCS,0
/PBC,U, ,0,,,,
/PBC,ROT, ,0,,,,
/PBC,F, ,0,,,,
/PBC,M, ,0,,,,
/PBC,NFOR, ,0,,,,
/PBC,NMOM, ,0,,,,
/PBC,RFOR, ,0,,,,
/PBC,RMOM, ,0,,,,
/PBC,PATH, ,1,,,,
FINISH
/POST1
/EFACET,1
PLNSOL, U,SUM, 0,1.0
/NUMBER,1
ETABLE,REFL
GPLOT
PLDISP,1
PLLS,LS1,LS6,1,0,0
LSEL,S,LOC,Y,30,55
LSEL,R,LOC,Z,-80,-40
ALLSEL,BELOW,LINE
ALLSEL,ALL
PLLS,LS2,LS7,1,0,0
/RGB,INDEX,100,100,100, 0
/RGB,INDEX, 80, 80, 80,13
/RGB,INDEX, 60, 60, 60,14
/RGB,INDEX, 0, 0, 0,15
PLLS,LS2,LS7,2,0,0
PLLS,LS2,LS7,1,0,0
/NUMBER,2
PLLS,LS2,LS7,0.5,0,0
GPLOT
PLLS,LS2,LS7,0.5,0,0
PLLS,LS2,LS7,0.2,0,0
PLLS,LS2,LS7,0.3,0,0
SAVE
GPLOT
/NUMBER,2
/GTYPE,1,KEYP,0
/GTYPE,1,LINE,1
/GTYPE,1,AREA,0
/GTYPE,1,VOLU,0
/GTYPE,1,NODE,0
/GTYPE,1,ELEM
FINISH
/PREP7
WPSTYLE,,,,,,,,0
FINISH
/POST1
RSYS,1
AVPRIN,0
AVRES,2,
/EFACET,1
LAYER,0
FORCE,TOTAL
FINISH
! /EXIT,NOSAV
/BATCH
/COM,ANSYS RELEASE 2020 R1           BUILD 20.1      UP20191203       19:19:10
/input,menust,tmp,''
/COM,ANSYS RELEASE 2020 R1           BUILD 20.1      UP20191203       19:19:11
/GST,ON
/PLO,INFO,3
/GRO,CURL,ON
/CPLANE,1
WPSTYLE,,,,,,,,0
GPLOT
! /DEV,FONT,ENTITY,MENU
/dev,font,2,Courier*New,400,0,-11,0,0,,,
/NUMBER,2
/GTYPE,1,KEYP,0
/GTYPE,1,LINE,0
/GTYPE,1,AREA,0
/GTYPE,1,VOLU,0
/GTYPE,1,NODE,1
/GTYPE,1,ELEM,1
/GCMD,1
/PSF,DEFA, ,1,0,1
/PBF,DEFA, ,1
/PSYMB,CS,0
/PSYMB,NDIR,0
/PSYMB,ESYS,0
/PSYMB,LDIV,0
/PSYMB,LDIR,0
/PSYMB,ADIR,0
/PSYMB,ECON,0
/PSYMB,XNODE,0
/PSYMB,DOT,1
/PSYMB,PCONV,
/PSYMB,LAYR,0
/PSYMB,FBCS,0
/PBC,U, ,1,,,,
/PBC,ROT, ,1,,,,
/PBC,F, ,1,,,,
/PBC,M, ,0,,,,
/PBC,NFOR, ,0,,,,
/PBC,NMOM, ,0,,,,
/PBC,RFOR, ,0,,,,
/PBC,RMOM, ,0,,,,
/PBC,PATH, ,0,,,,
/PREP7
FLST,2,1514,1,ORDE,2
FITEM,2,1
FITEM,2,-1514
FDELE,P51X,ALL
GPLOT
FLST,2,1514,1,ORDE,2
FITEM,2,1
FITEM,2,-1514
/GO
F,P51X,FX,31
GPLOT
FLST,2,2,1,ORDE,2
FITEM,2,1513
FITEM,2,-1514
FDELE,P51X,ALL
GPLOT
FINISH
/SOL
/STATUS,SOLU
SOLVE
FINISH
/POST1
ETABLE,REFL
/PSF,DEFA, ,1,0,1
/PBF,DEFA, ,1
/PSYMB,CS,0
/PSYMB,NDIR,0
/PSYMB,ESYS,0
/PSYMB,LDIV,0
/PSYMB,LDIR,0
/PSYMB,ADIR,0
/PSYMB,ECON,0
/PSYMB,XNODE,0
/PSYMB,DOT,1
/PSYMB,PCONV,
/PSYMB,LAYR,0
/PSYMB,FBCS,0
/PBC,U, ,0,,,,
/PBC,ROT, ,0,,,,
/PBC,F, ,0,,,,
/PBC,M, ,0,,,,
/PBC,NFOR, ,0,,,,
/PBC,NMOM, ,0,,,,
/PBC,RFOR, ,0,,,,
/PBC,RMOM, ,0,,,,
/PBC,PATH, ,0,,,,
/RGB,INDEX,100,100,100, 0
/RGB,INDEX, 80, 80, 80,13
/RGB,INDEX, 60, 60, 60,14
/RGB,INDEX, 0, 0, 0,15
/NUMBER,1
/EFACET,1
PLNSOL, U,SUM, 0,1.0
/EFACET,1
PLNSOL, U,SUM, 1,1.0
PLLS,LS1,LS6,1,0,0
/NUMBER,1
/NUMBER,2
/NUMBER,2
SAVE
GPLOT
/NUMBER,2
PLLS,LS1,LS6,1,0,0
LSEL,S,LOC,Y,0,90
ALLSEL,BELOW,LINE
GPLOT
PLLS,LS1,LS6,1,0,0
AVPRIN,0, ,
ETABLE, ,LS, 4
AVPRIN,0, ,
ETABLE, ,LS, 9
ETABLE,REFL
ALLSEL,ALL
GPLOT
ETABLE,REFL
PLLS,LS1,LS6,1,0,0
PLLS,LS2,LS7,1,0,0
PLLS,LS2,LS7,0.3,0,0
PLLS,LS4,LS9,0.3,0,0
AVPRIN,0, ,
ETABLE, ,SMISC, 4
AVPRIN,0, ,
ETABLE, ,SMISC, 10
ETABLE,REFL
PLLS,SMIS4,SMIS10,0.3,0,0
LSEL,S,LOC,Y,0,90
ALLSEL,BELOW,LINE
PLLS,LS1,LS6,0.3,0,0
PLLS,LS2,LS7,0.3,0,0
ALLSEL,ALL
PLLS,LS2,LS7,0.3,0,0
LSEL,S,LOC,Y,0,90
ALLSEL,BELOW,LINE
GPLOT
PLLS,LS2,LS7,0.3,0,0
ALLSEL,ALL
GPLOT
PLLS,LS2,LS7,0.3,0,0
LSEL,S,LOC,Y,0,90
ALLSEL,BELOW,LINE
ALLSEL,ALL
GPLOT
PLLS,LS2,LS7,0.3,0,0
PLLS,LS1,LS6,0.3,0,0
PRETAB,
GPLOT
PLLS,LS1,LS6,0.3,0,0
LSEL,S,LOC,Y,0,90
ALLSEL,BELOW,LINE
PRETAB,
ALLSEL,ALL
GPLOT
PLLS,LS1,LS6,0.3,0,0
PRETAB,
ALLSEL,ALL
LSEL,S,LOC,Y,0,90
ALLSEL,BELOW,LINE
PRETAB,LS1
ALLSEL,ALL
GPLOT
ETABLE,REFL
PRETAB,LS1,LS2,LS7,LS4,LS9,SMIS4
ETABLE,,ERASE,8
ETABLE,,ERASE,7
AVPRIN,0, ,
ETABLE, ,SMISC, 4
AVPRIN,0, ,
ETABLE, ,SMISC, 10
PLLS,SMIS4,SMIS10,0.3,0,0
GPLOT
PRETAB,LS1,LS2,LS7,LS4,LS9,SMIS4
LSEL,S,LOC,Y,0,90
ALLSEL,BELOW,LINE
PRETAB,LS1,LS2,LS7,LS4,LS9,SMIS4
SAVE
FINISH
! /EXIT,NOSAV
/BATCH
/COM,ANSYS RELEASE 2020 R1           BUILD 20.1      UP20191203       00:45:32
/input,menust,tmp,''
/COM,ANSYS RELEASE 2020 R1           BUILD 20.1      UP20191203       00:45:32
/GST,ON
/PLO,INFO,3
/GRO,CURL,ON
/CPLANE,1
WPSTYLE,,,,,,,,0
GPLOT
/POST1
ALLSEL,ALL
ETABLE,REFL
/EFACET,1
PLNSOL, U,SUM, 0,1.0
/NUMBER,1
/RGB,INDEX,100,100,100, 0
/RGB,INDEX, 80, 80, 80,13
/RGB,INDEX, 60, 60, 60,14
/RGB,INDEX, 0, 0, 0,15
PLLS,LS2,LS7,1,0,0
/NUMBER,2
LSEL,S,LOC,Y,0,90
ALLSEL,BELOW,LINE
PLLS,LS2,LS7,0.5,0,0
FINISH
! /EXIT,NOSAV
/BATCH
/COM,ANSYS RELEASE 2020 R1           BUILD 20.1      UP20191203       22:50:30
/input,menust,tmp,''
/COM,ANSYS RELEASE 2020 R1           BUILD 20.1      UP20191203       22:50:30
/GST,ON
/PLO,INFO,3
/GRO,CURL,ON
/CPLANE,1
WPSTYLE,,,,,,,,0
GPLOT
ALLSEL,ALL
GPLOT
/NUMBER,2
/POST1
ETABLE,REFL
PLLS,SMIS4,SMIS10,1,0,0
/NUMBER,1
/NUMBER,2
/RGB,INDEX,100,100,100, 0
/RGB,INDEX, 80, 80, 80,13
/RGB,INDEX, 60, 60, 60,14
/RGB,INDEX, 0, 0, 0,15
/NUMBER,2
PLLS,LS1,LS6,1,1,0
SAVE,'full_carcass_lds_break2','db','C:\Users\bulol\Desktop\D2DE~1\ANSYS~1\AFF3~1\2D7C~1\2782E~1\'
FINISH
! /EXIT,NOSAV
/BATCH
/COM,ANSYS RELEASE 2020 R1           BUILD 20.1      UP20191203       22:28:49
/input,menust,tmp,''
/COM,ANSYS RELEASE 2020 R1           BUILD 20.1      UP20191203       22:28:50
/GST,ON
/PLO,INFO,3
/GRO,CURL,ON
/CPLANE,1
WPSTYLE,,,,,,,,0
GPLOT
/POST1
ALLSEL,ALL
GPLOT
/RGB,INDEX,100,100,100, 0
/RGB,INDEX, 80, 80, 80,13
/RGB,INDEX, 60, 60, 60,14
/RGB,INDEX, 0, 0, 0,15
LSEL,S,LOC,Y,0,90
ALLSEL,BELOW,LINE
GPLOT
/EFACET,1
PLNSOL, U,Y, 0,1.0
/NUMBER,1
GPLOT
/PSF,DEFA, ,1,0,1
/PBF,DEFA, ,1
/PSYMB,CS,0
/PSYMB,NDIR,0
/PSYMB,ESYS,0
/PSYMB,LDIV,0
/PSYMB,LDIR,0
/PSYMB,ADIR,0
/PSYMB,ECON,0
/PSYMB,XNODE,0
/PSYMB,DOT,1
/PSYMB,PCONV,
/PSYMB,LAYR,0
/PSYMB,FBCS,0
/PBC,ALL, ,1
/PSF,DEFA, ,1,0,1
/PBF,DEFA, ,1
/PSYMB,CS,0
/PSYMB,NDIR,0
/PSYMB,ESYS,0
/PSYMB,LDIV,0
/PSYMB,LDIR,0
/PSYMB,ADIR,0
/PSYMB,ECON,0
/PSYMB,XNODE,0
/PSYMB,DOT,1
/PSYMB,PCONV,
/PSYMB,LAYR,0
/PSYMB,FBCS,0
/PBC,U, ,1,,,,
/PBC,ROT, ,1,,,,
/PBC,F, ,2,,,,
/PBC,M, ,1,,,,
/PBC,NFOR, ,1,,,,
/PBC,NMOM, ,1,,,,
/PBC,RFOR, ,1,,,,
/PBC,RMOM, ,1,,,,
/PBC,PATH, ,1,,,,
ALLSEL,ALL
GPLOT
/PSF,DEFA, ,1,0,1
/PBF,DEFA, ,1
/PSYMB,CS,0
/PSYMB,NDIR,0
/PSYMB,ESYS,0
/PSYMB,LDIV,0
/PSYMB,LDIR,0
/PSYMB,ADIR,0
/PSYMB,ECON,0
/PSYMB,XNODE,0
/PSYMB,DOT,1
/PSYMB,PCONV,
/PSYMB,LAYR,0
/PSYMB,FBCS,0
/PBC,U, ,1,,,,
/PBC,ROT, ,1,,,,
/PBC,F, ,1,,,,
/PBC,M, ,1,,,,
/PBC,NFOR, ,0,,,,
/PBC,NMOM, ,0,,,,
/PBC,RFOR, ,0,,,,
/PBC,RMOM, ,0,,,,
/PBC,PATH, ,1,,,,
FINISH
/PREP7
FLST,2,1514,1,ORDE,2
FITEM,2,1
FITEM,2,-1514
FDELE,P51X,ALL
GPLOT
FLST,2,1514,1,ORDE,2
FITEM,2,1
FITEM,2,-1514
/GO
F,P51X,FX,61
FLST,2,2,1,ORDE,2
FITEM,2,1513
FITEM,2,-1514
FDELE,P51X,ALL
GPLOT
FINISH
/SOL
/STATUS,SOLU
SOLVE
FINISH
/POST1
ETABLE,REFL
/EFACET,1
PLNSOL, U,Y, 0,1.0
/PLOPTS,INFO,3
/PLOPTS,LEG1,1
/PLOPTS,LEG2,1
/PLOPTS,LEG3,1
/PLOPTS,FRAME,1
/PLOPTS,TITLE,1
/PLOPTS,MINM,1
/PLOPTS,FILE,0
/PLOPTS,SPNO,0
/PLOPTS,LOGO,1
/PLOPTS,WINS,1
/PLOPTS,WP,0
/PLOPTS,DATE,0
LSEL,S,LOC,Y,0,90
ALLSEL,BELOW,LINE
ALLSEL,BELOW,LINE
/EFACET,1
PLNSOL, U,X, 0,1.0
/EFACET,1
PLNSOL, U,Y, 0,1.0
/EFACET,1
PLNSOL, U,Y, 1,1.0
/EFACET,1
PLNSOL, U,SUM, 1,1.0
/EFACET,1
PLNSOL, U,Y, 1,1.0
PRNSOL,U,X
NPLOT
GPLOT
/NUMBER,1
/NUMBER,2
/EFACET,1
PLNSOL, U,Y, 1,1.0
/PLOPTS,INFO,3
/PLOPTS,LEG1,1
/PLOPTS,LEG2,1
/PLOPTS,LEG3,1
/PLOPTS,FRAME,1
/PLOPTS,TITLE,1
/PLOPTS,MINM,0
/PLOPTS,FILE,0
/PLOPTS,SPNO,0
/PLOPTS,LOGO,1
/PLOPTS,WINS,1
/PLOPTS,WP,0
/PLOPTS,DATE,0
/NUMBER,0
PRNSOL,U,X
RSYS,0
AVPRIN,0
AVRES,2,
/EFACET,1
LAYER,0
FORCE,TOTAL
/EFACET,1
PLNSOL, U,Y, 1,1.0
PRNSOL,U,Y
PRNSOL,U,X
PRNSOL,U,Z
RSYS,1
AVPRIN,0
AVRES,2,
/EFACET,1
LAYER,0
FORCE,TOTAL
/EFACET,1
PLNSOL, U,Y, 1,1.0
SAVE
FINISH
! /EXIT,NOSAV
/BATCH
/COM,ANSYS RELEASE 2020 R1           BUILD 20.1      UP20191203       11:43:56
/input,menust,tmp,''
/COM,ANSYS RELEASE 2020 R1           BUILD 20.1      UP20191203       11:43:56
/GST,ON
/PLO,INFO,3
/GRO,CURL,ON
/CPLANE,1
WPSTYLE,,,,,,,,0
GPLOT
/POST1
RSYS,0
AVPRIN,0
AVRES,2,
/EFACET,1
LAYER,0
FORCE,TOTAL
/EFACET,1
PLNSOL, U,SUM, 0,1.0
/EFACET,1
PLNSOL, U,SUM, 1,1.0
/RGB,INDEX,100,100,100, 0
/RGB,INDEX, 80, 80, 80,13
/RGB,INDEX, 60, 60, 60,14
/RGB,INDEX, 0, 0, 0,15
PRNSOL,U,X
RSYS,0
AVPRIN,0
AVRES,2,
/EFACET,1
LAYER,0
FORCE,TOTAL
PRNSOL,U,X
RSYS,1
AVPRIN,0
AVRES,2,
/EFACET,1
LAYER,0
FORCE,TOTAL
/EFACET,1
PLNSOL, U,Y, 1,1.0
NLIST,ALL, , ,XYZ,NODE,NODE,NODE
PRVECT,U
/SHRINK,0
/ESHAPE,1.0
/EFACET,1
/RATIO,1,1,1
/CFORMAT,32,0
/EFACET,1
PLNSOL, U,Y, 0,1.0
/NUMBER,0
PLLS,LS1,LS6,0.5,0,0
/NUMBER,2
PLLS,LS1,LS6,0.5,1,0
SAVE
FINISH
! /EXIT,NOSAV
/BATCH
/COM,ANSYS RELEASE 2020 R1           BUILD 20.1      UP20191203       19:05:45
/input,menust,tmp,''
/COM,ANSYS RELEASE 2020 R1           BUILD 20.1      UP20191203       19:05:45
/GST,ON
/PLO,INFO,3
/GRO,CURL,ON
/CPLANE,1
WPSTYLE,,,,,,,,0
GPLOT
/RGB,INDEX,100,100,100, 0
/RGB,INDEX, 80, 80, 80,13
/RGB,INDEX, 60, 60, 60,14
/RGB,INDEX, 0, 0, 0,15
/NUMBER,2
/PREP7
/SHRINK,0
/ESHAPE,0.0
/EFACET,1
/RATIO,1,1,1
/CFORMAT,32,0
FINISH
/POST1
PLLS,LS1,LS6,1,0,0
/NUMBER,2
/SHRINK,0
/ESHAPE,1.0
/EFACET,1
/RATIO,1,1,1
/CFORMAT,32,0
GPLOT
PLLS,LS1,LS6,1,0,0
/SHRINK,0
/ESHAPE,0.0
/EFACET,1
/RATIO,1,1,1
/CFORMAT,32,0
GPLOT
PLLS,LS1,LS6,1,0,0
GPLOT
PLLS,LS2,LS7,1,0,0
GPLOT
PLLS,LS4,LS9,1,0,0
PLLS,LS1,LS6,1,0,0
PLLS,LS1,LS6,0.5,0,0
PLLS,LS1,LS6,0.4,0,0
PLLS,LS1,LS6,0.3,0,0
GPLOT
PRETAB,LS1,LS2,LS7,LS4,LS9,SMIS4
PLLS,SMIS4,SMIS10,0.3,0,0
GPLOT
GPLOT
SAVE
FINISH
! /EXIT,NOSAV
/BATCH
/COM,ANSYS RELEASE 2020 R1           BUILD 20.1      UP20191203       02:05:29
/input,menust,tmp,''
/COM,ANSYS RELEASE 2020 R1           BUILD 20.1      UP20191203       02:05:29
/GST,ON
/PLO,INFO,3
/GRO,CURL,ON
/CPLANE,1
WPSTYLE,,,,,,,,0
GPLOT
/RGB,INDEX,100,100,100, 0
/RGB,INDEX, 80, 80, 80,13
/RGB,INDEX, 60, 60, 60,14
/RGB,INDEX, 0, 0, 0,15
FINISH
! /EXIT,NOSAV
/BATCH
/COM,ANSYS RELEASE 2020 R1           BUILD 20.1      UP20191203       13:27:20
/input,menust,tmp,''
/COM,ANSYS RELEASE 2020 R1           BUILD 20.1      UP20191203       13:27:20
/GST,ON
/PLO,INFO,3
/GRO,CURL,ON
/CPLANE,1
WPSTYLE,,,,,,,,0
GPLOT
/RGB,INDEX,100,100,100, 0
/RGB,INDEX, 80, 80, 80,13
/RGB,INDEX, 60, 60, 60,14
/RGB,INDEX, 0, 0, 0,15
! /DEV,FONT,ENTITY,MENU
/dev,font,2,Courier*New,400,0,-19,0,0,,,
/PREP7
EPLOT
GPLOT
/SHRINK,0
/ESHAPE,1.0
/EFACET,1
/RATIO,1,1,1
/CFORMAT,32,0
/SHRINK,0
/ESHAPE,0.0
/EFACET,1
/RATIO,1,1,1
/CFORMAT,32,0
! /DEV,FONT,ENTITY,MENU
/dev,font,2,Courier*New,400,0,-24,0,0,,,
FINISH
/POST1
PLDISP,0
/NUMBER,0
/NUMBER,2
/NUMBER,0
/EFACET,1
PLNSOL, U,Y, 0,1.0
RSYS,1
AVPRIN,0
AVRES,2,
/EFACET,1
LAYER,0
FORCE,TOTAL
/EFACET,1
PLNSOL, U,Y, 1,1.0
/NUMBER,0
FINISH
! /EXIT,NOSAV
/BATCH
/COM,ANSYS RELEASE 2020 R1           BUILD 20.1      UP20191203       02:00:10
/input,menust,tmp,''
/COM,ANSYS RELEASE 2020 R1           BUILD 20.1      UP20191203       02:00:10
/GST,ON
/PLO,INFO,3
/GRO,CURL,ON
/CPLANE,1
WPSTYLE,,,,,,,,0
GPLOT
/RGB,INDEX,100,100,100, 0
/RGB,INDEX, 80, 80, 80,13
/RGB,INDEX, 60, 60, 60,14
/RGB,INDEX, 0, 0, 0,15
/POST1
PLLS,LS1,LS6,1,0,0
PLLS,LS1,LS6,0.2,0,0
PLLS,LS1,LS6,0.5,0,0
PLLS,LS1,LS6,0.4,0,0
PLLS,LS1,LS6,0.5,0,0
PLLS,LS1,LS6,0.3,0,0
PLLS,LS2,LS7,0.3,0,0
FINISH
! /EXIT,NOSAV
/BATCH
/COM,ANSYS RELEASE 2020 R1           BUILD 20.1      UP20191203       01:33:04
/input,menust,tmp,''
/COM,ANSYS RELEASE 2020 R1           BUILD 20.1      UP20191203       01:33:04
/GST,ON
/PLO,INFO,3
/GRO,CURL,ON
/CPLANE,1
WPSTYLE,,,,,,,,0
GPLOT
/POST1
PLLS,LS2,LS7,1,0,0
WPSTYLE,,,,,,,,1
WPSTYLE,,,,,,,,0
SAVE,'full_carcass_lds_combbreaks1','db','C:\Users\bulol\Desktop\D2DE~1\ANSYS~1\58E3~1\0F76~1\'
FINISH
! /EXIT,NOSAV
/BATCH
/COM,ANSYS RELEASE 2020 R1           BUILD 20.1      UP20191203       14:25:02
/input,menust,tmp,''
/COM,ANSYS RELEASE 2020 R1           BUILD 20.1      UP20191203       14:25:02
/GST,ON
/PLO,INFO,3
/GRO,CURL,ON
/CPLANE,1
WPSTYLE,,,,,,,,0
/RGB,INDEX,100,100,100, 0
/RGB,INDEX, 80, 80, 80,13
/RGB,INDEX, 60, 60, 60,14
/RGB,INDEX, 0, 0, 0,15
GPLOT
/PLOPTS,INFO,3
/PLOPTS,LEG1,1
/PLOPTS,LEG2,1
/PLOPTS,LEG3,1
/PLOPTS,FRAME,1
/PLOPTS,TITLE,1
/PLOPTS,MINM,0
/PLOPTS,FILE,0
/PLOPTS,SPNO,1
/PLOPTS,LOGO,1
/PLOPTS,WINS,1
/PLOPTS,WP,0
/PLOPTS,DATE,0
/PLOPTS,INFO,3
/PLOPTS,LEG1,1
/PLOPTS,LEG2,1
/PLOPTS,LEG3,1
/PLOPTS,FRAME,1
/PLOPTS,TITLE,1
/PLOPTS,MINM,0
/PLOPTS,FILE,0
/PLOPTS,SPNO,0
/PLOPTS,LOGO,0
/PLOPTS,WINS,1
/PLOPTS,WP,0
/PLOPTS,DATE,0
/PLOPTS,INFO,3
/PLOPTS,LEG1,1
/PLOPTS,LEG2,1
/PLOPTS,LEG3,1
/PLOPTS,FRAME,1
/PLOPTS,TITLE,1
/PLOPTS,MINM,0
/PLOPTS,FILE,0
/PLOPTS,SPNO,0
/PLOPTS,LOGO,1
/PLOPTS,WINS,1
/PLOPTS,WP,0
/PLOPTS,DATE,0
/POST1
/EFACET,1
PLNSOL, U,X, 0,1.0
/NUMBER,0
/SHRINK,0
/ESHAPE,1.0
/EFACET,1
/RATIO,1,1,1
/CFORMAT,32,0
/SHRINK,0
/ESHAPE,0.0
/EFACET,1
/RATIO,1,1,1
/CFORMAT,32,0
/EFACET,1
PLNSOL, U,Y, 0,1.0
/NUMBER,0
! /DEV,FONT,ENTITY,MENU
/dev,font,2,Courier*New,400,0,-27,0,0,,,
! /DEV,FONT,ENTITY,MENU
/dev,font,2,Courier*New,400,0,-21,0,0,,,
! /DEV,FONT,ENTITY,MENU
/dev,font,2,Courier*New,400,0,-19,0,0,,,
! /DEV,FONT,ENTITY,MENU
/dev,font,2,Courier*New,400,0,-15,0,0,,,
/NUMBER,0
LSEL,S,LOC,Y,37, 49
ALLSEL,BELOW,LINE
LSEL,R,LOC,X,-46, -39
ALLSEL,BELOW,LINE
LSEL,R,LOC,Z,-46, -39
ALLSEL,BELOW,LINE
LSEL,S,LOC,Z,-46, -39
ALLSEL,BELOW,LINE
LSEL,S,LOC,Z,-46, -30
ALLSEL,BELOW,LINE
LSEL,S,LOC,Z,-50,-39
ALLSEL,BELOW,LINE
ALLSEL,ALL
LSEL,S,LOC,Z,-50,-36
ALLSEL,BELOW,LINE
/EFACET,1
PLNSOL, U,Y, 0,1.0
ALLSEL,ALL
LSEL,S,LOC,Z,-50,-20
ALLSEL,BELOW,LINE
LSEL,S,LOC,Z,-60,-39
ALLSEL,BELOW,LINE
LSEL,S,LOC,Z,-59,-39
ALLSEL,BELOW,LINE
LSEL,S,LOC,Z,-58,-51
ALLSEL,BELOW,LINE
/SHRINK,0
/ESHAPE,1.0
/EFACET,1
/RATIO,1,1,1
/CFORMAT,32,0
FINISH
/PREP7
SECTYPE,   1, BEAM, CSOLID, , 0
SECOFFSET, CENT
SECDATA,0,0,0,0,0,0,0,0,0,0,0,0
SECTYPE,   1, BEAM, CSOLID, , 0
SECOFFSET, CENT
SECDATA,1.5,0,0,0,0,0,0,0,0,0,0,0
SECTYPE,   1, BEAM, CSOLID, F, 0
SECOFFSET, CENT
SECDATA,1.5,0,0,0,0,0,0,0,0,0,0,0
SECPLOT,1,1
FINISH
/POST1
/EFACET,1
PLNSOL, U,Y, 0,1.0
LSEL,R,LOC,X,100-1.5, 100+1.5
ALLSEL,BELOW,LINE
LSEL,S,LOC,Z,-58, -54
ALLSEL,BELOW,LINE
LSEL,S,LOC,Z,-55,-54
ALLSEL,BELOW,LINE
/SHRINK,0
/ESHAPE,0.0
/EFACET,1
/RATIO,1,1,1
/CFORMAT,32,0
FINISH
! /EXIT,NOSAV
