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/BATCH
/COM,ANSYS RELEASE 2020 R1           BUILD 20.1      UP20191203       22:57:44
/input,menust,tmp,''
/COM,ANSYS RELEASE 2020 R1           BUILD 20.1      UP20191203       22:57:44
/GST,ON
/PLO,INFO,3
/GRO,CURL,ON
/CPLANE,1
WPSTYLE,,,,,,,,0
/POST1
ETABLE,REFL
GPLOT
FINISH
! /EXIT,NOSAV
/BATCH
/COM,ANSYS RELEASE 2020 R1           BUILD 20.1      UP20191203       09:55:29
/input,menust,tmp,''
/COM,ANSYS RELEASE 2020 R1           BUILD 20.1      UP20191203       09:55:29
/GST,ON
/PLO,INFO,3
/GRO,CURL,ON
/CPLANE,1
WPSTYLE,,,,,,,,0
GPLOT
LSEL,S,LOC,Y,0,90
ALLSEL,BELOW,LINE
/PREP7
WPSTYLE,,,,,,,,1
/PSF,DEFA, ,1,0,1
/PBF,DEFA, ,1
/PSYMB,CS,0
/PSYMB,NDIR,0
/PSYMB,ESYS,0
/PSYMB,LDIV,0
/PSYMB,LDIR,0
/PSYMB,ADIR,0
/PSYMB,ECON,0
/PSYMB,XNODE,0
/PSYMB,DOT,1
/PSYMB,PCONV,
/PSYMB,LAYR,0
/PSYMB,FBCS,0
/PBC,U, ,1,,,,
/PBC,ROT, ,1,,,,
/PBC,F, ,1,,,,
/PBC,M, ,0,,,,
/PBC,NFOR, ,0,,,,
/PBC,NMOM, ,0,,,,
/PBC,RFOR, ,0,,,,
/PBC,RMOM, ,0,,,,
/PBC,PATH, ,0,,,,
/GTYPE,1,KEYP,1
/GTYPE,1,LINE,1
/GTYPE,1,AREA,0
/GTYPE,1,VOLU,0
/GTYPE,1,NODE,0
/GTYPE,1,ELEM,0
/GCMD,1
GPLOT
wprot,42.5,0,0
wprot,0,90,0
/NUMBER,2
! /DEV,FONT,ENTITY,MENU
/dev,font,2,Courier*New,400,0,-11,0,0,,,
/PSF,DEFA, ,1,0,1
/PBF,DEFA, ,1
/PSYMB,CS,0
/PSYMB,NDIR,0
/PSYMB,ESYS,0
/PSYMB,LDIV,0
/PSYMB,LDIR,0
/PSYMB,ADIR,0
/PSYMB,ECON,0
/PSYMB,XNODE,0
/PSYMB,DOT,1
/PSYMB,PCONV,
/PSYMB,LAYR,0
/PSYMB,FBCS,0
/PBC,U, ,0,,,,
/PBC,ROT, ,0,,,,
/PBC,F, ,0,,,,
/PBC,M, ,0,,,,
/PBC,NFOR, ,0,,,,
/PBC,NMOM, ,0,,,,
/PBC,RFOR, ,0,,,,
/PBC,RMOM, ,0,,,,
/PBC,PATH, ,0,,,,
LCLEAR,     379
LSBW,     379
wprot,0,0,-0.3
LSBW,     342
LDELE,     379, , ,1
/NUMBER,2
FLST,5,2,4,ORDE,2
FITEM,5,2953
FITEM,5,2956
CM,_Y,LINE
LSEL, , , ,P51X
CM,_Y1,LINE
CMSEL,S,_Y
CMSEL,S,_Y1
LATT,1,1,1, , , ,
CMSEL,S,_Y
CMDELE,_Y
CMDELE,_Y1
FLST,5,2,4,ORDE,2
FITEM,5,2953
FITEM,5,2956
CM,_Y,LINE
LSEL, , , ,P51X
CM,_Y1,LINE
CMSEL,,_Y
LESIZE,_Y1, , ,1, , , , ,1
/GTYPE,1,KEYP,1
/GTYPE,1,LINE,1
/GTYPE,1,AREA,0
/GTYPE,1,VOLU,0
/GTYPE,1,NODE,0
/GTYPE,1,ELEM,1
/GCMD,1
FLST,2,2,4,ORDE,2
FITEM,2,2953
FITEM,2,2956
LMESH,P51X
/NUMBER,2
/GTYPE,1,KEYP,0
/GTYPE,1,LINE,0
/GTYPE,1,AREA,0
/GTYPE,1,VOLU,0
/GTYPE,1,NODE,1
/GTYPE,1,ELEM,1
/GCMD,1
GPLOT
ALLSEL,ALL
/NUMBER,2
/NUMBER,2
/NUMBER,2
/PSF,DEFA, ,1,0,1
/PBF,DEFA, ,1
/PSYMB,CS,0
/PSYMB,NDIR,0
/PSYMB,ESYS,0
/PSYMB,LDIV,0
/PSYMB,LDIR,0
/PSYMB,ADIR,0
/PSYMB,ECON,0
/PSYMB,XNODE,0
/PSYMB,DOT,1
/PSYMB,PCONV,
/PSYMB,LAYR,0
/PSYMB,FBCS,0
/PBC,U, ,1,,,,
/PBC,ROT, ,1,,,,
/PBC,F, ,1,,,,
/PBC,M, ,0,,,,
/PBC,NFOR, ,0,,,,
/PBC,NMOM, ,0,,,,
/PBC,RFOR, ,0,,,,
/PBC,RMOM, ,0,,,,
/PBC,PATH, ,0,,,,
FINISH
/SOL
/STATUS,SOLU
SOLVE
FINISH
/POST1
ETABLE,REFL
PLLS,LS1,LS6,1,0,0
/NUMBER,2
/NUMBER,1
/RGB,INDEX,100,100,100, 0
/RGB,INDEX, 80, 80, 80,13
/RGB,INDEX, 60, 60, 60,14
/RGB,INDEX, 0, 0, 0,15
/NUMBER,2
/EFACET,1
PLNSOL, U,SUM, 0,1.0
/NUMBER,1
SAVE
/PLOPTS,INFO,3
/PLOPTS,LEG1,1
/PLOPTS,LEG2,1
/PLOPTS,LEG3,1
/PLOPTS,FRAME,1
/PLOPTS,TITLE,1
/PLOPTS,MINM,1
/PLOPTS,FILE,0
/PLOPTS,SPNO,0
/PLOPTS,LOGO,1
/PLOPTS,WINS,1
/PLOPTS,WP,0
/PLOPTS,DATE,0
/PLOPTS,INFO,3
/PLOPTS,LEG1,1
/PLOPTS,LEG2,1
/PLOPTS,LEG3,1
/PLOPTS,FRAME,1
/PLOPTS,TITLE,1
/PLOPTS,MINM,0
/PLOPTS,FILE,0
/PLOPTS,SPNO,0
/PLOPTS,LOGO,1
/PLOPTS,WINS,1
/PLOPTS,WP,0
/PLOPTS,DATE,0
PRETAB,LS1,LS2,LS7,LS4,LS9,SMIS4
LSEL,S,LOC,Y,0,90
ALLSEL,BELOW,LINE
PRETAB,LS1,LS2,LS7,LS4,LS9,SMIS4
PRETAB,LS1,LS2,LS7,LS4,LS9,SMIS4
SAVE
FINISH
! /EXIT,NOSAV
/BATCH
/COM,ANSYS RELEASE 2020 R1           BUILD 20.1      UP20191203       00:22:11
/input,menust,tmp,''
/COM,ANSYS RELEASE 2020 R1           BUILD 20.1      UP20191203       00:22:11
/GST,ON
/PLO,INFO,3
/GRO,CURL,ON
/CPLANE,1
WPSTYLE,,,,,,,,0
GPLOT
ALLSEL,ALL
GPLOT
/RGB,INDEX,100,100,100, 0
/RGB,INDEX, 80, 80, 80,13
/RGB,INDEX, 60, 60, 60,14
/RGB,INDEX, 0, 0, 0,15
/PSF,DEFA, ,1,0,1
/PBF,DEFA, ,1
/PSYMB,CS,0
/PSYMB,NDIR,0
/PSYMB,ESYS,0
/PSYMB,LDIV,0
/PSYMB,LDIR,0
/PSYMB,ADIR,0
/PSYMB,ECON,0
/PSYMB,XNODE,0
/PSYMB,DOT,1
/PSYMB,PCONV,
/PSYMB,LAYR,0
/PSYMB,FBCS,0
/PBC,U, ,0,,,,
/PBC,ROT, ,0,,,,
/PBC,F, ,2,,,,
/PBC,M, ,0,,,,
/PBC,NFOR, ,0,,,,
/PBC,NMOM, ,0,,,,
/PBC,RFOR, ,0,,,,
/PBC,RMOM, ,0,,,,
/PBC,PATH, ,0,,,,
/PREP7
FLST,2,1516,1,ORDE,2
FITEM,2,1
FITEM,2,-1516
FDELE,P51X,ALL
GPLOT
FLST,2,1516,1,ORDE,2
FITEM,2,1
FITEM,2,-1516
/GO
F,P51X,FX,61
GPLOT
/PSF,DEFA, ,1,0,1
/PBF,DEFA, ,1
/PSYMB,CS,0
/PSYMB,NDIR,0
/PSYMB,ESYS,0
/PSYMB,LDIV,0
/PSYMB,LDIR,0
/PSYMB,ADIR,0
/PSYMB,ECON,0
/PSYMB,XNODE,0
/PSYMB,DOT,1
/PSYMB,PCONV,
/PSYMB,LAYR,0
/PSYMB,FBCS,0
/PBC,U, ,1,,,,
/PBC,ROT, ,1,,,,
/PBC,F, ,1,,,,
/PBC,M, ,1,,,,
/PBC,NFOR, ,0,,,,
/PBC,NMOM, ,0,,,,
/PBC,RFOR, ,0,,,,
/PBC,RMOM, ,0,,,,
/PBC,PATH, ,1,,,,
FINISH
/POST1
FINISH
/PREP7
FLST,2,1516,1,ORDE,2
FITEM,2,1
FITEM,2,-1516
NROTAT,P51X
FLST,2,1516,1,ORDE,2
FITEM,2,1
FITEM,2,-1516
FDELE,P51X,ALL
GPLOT
FLST,2,1516,1,ORDE,2
FITEM,2,1
FITEM,2,-1516
/GO
F,P51X,FX,61
/PSF,DEFA, ,1,0,1
/PBF,DEFA, ,1
/PSYMB,CS,0
/PSYMB,NDIR,0
/PSYMB,ESYS,0
/PSYMB,LDIV,0
/PSYMB,LDIR,0
/PSYMB,ADIR,0
/PSYMB,ECON,0
/PSYMB,XNODE,0
/PSYMB,DOT,1
/PSYMB,PCONV,
/PSYMB,LAYR,0
/PSYMB,FBCS,0
/PBC,U, ,1,,,,
/PBC,ROT, ,1,,,,
/PBC,F, ,2,,,,
/PBC,M, ,1,,,,
/PBC,NFOR, ,0,,,,
/PBC,NMOM, ,0,,,,
/PBC,RFOR, ,0,,,,
/PBC,RMOM, ,0,,,,
/PBC,PATH, ,0,,,,
FLST,2,4,1,ORDE,2
FITEM,2,1513
FITEM,2,-1516
FDELE,P51X,ALL
GPLOT
/PSF,DEFA, ,1,0,1
/PBF,DEFA, ,1
/PSYMB,CS,0
/PSYMB,NDIR,0
/PSYMB,ESYS,0
/PSYMB,LDIV,0
/PSYMB,LDIR,0
/PSYMB,ADIR,0
/PSYMB,ECON,0
/PSYMB,XNODE,0
/PSYMB,DOT,1
/PSYMB,PCONV,
/PSYMB,LAYR,0
/PSYMB,FBCS,0
/PSF,DEFA, ,1,0,1
/PBF,DEFA, ,1
/PSYMB,CS,0
/PSYMB,NDIR,0
/PSYMB,ESYS,0
/PSYMB,LDIV,0
/PSYMB,LDIR,0
/PSYMB,ADIR,0
/PSYMB,ECON,0
/PSYMB,XNODE,0
/PSYMB,DOT,1
/PSYMB,PCONV,
/PSYMB,LAYR,0
/PSYMB,FBCS,0
/PBC,ALL, ,0
FINISH
/SOL
/STATUS,SOLU
SOLVE
FINISH
/POST1
RSYS,1
AVPRIN,0
AVRES,2,
/EFACET,1
LAYER,0
FORCE,TOTAL
ETABLE,REFL
/EFACET,1
PLNSOL, U,SUM, 0,1.0
LSEL,S,LOC,Y,0,90
ALLSEL,BELOW,LINE
PRETAB,LS1,LS2,LS7,LS4,LS9,SMIS4
GPLOT
/NUMBER,0
/NUMBER,2
SAVE
FINISH
! /EXIT,NOSAV
/BATCH
/COM,ANSYS RELEASE 2020 R1           BUILD 20.1      UP20191203       12:15:42
/input,menust,tmp,''
/COM,ANSYS RELEASE 2020 R1           BUILD 20.1      UP20191203       12:15:42
/GST,ON
/PLO,INFO,3
/GRO,CURL,ON
/CPLANE,1
WPSTYLE,,,,,,,,0
GPLOT
SAVE,'full_carcass_lds_break3','db','C:\Users\bulol\Desktop\D2DE~1\ANSYS~1\AFF3~1\2D7C~1\39447~1\'
FINISH
! /EXIT,NOSAV
