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/BATCH
/COM,ANSYS RELEASE 2020 R1           BUILD 20.1      UP20191203       12:18:35
/input,menust,tmp,''
/COM,ANSYS RELEASE 2020 R1           BUILD 20.1      UP20191203       12:18:35
/GST,ON
/PLO,INFO,3
/GRO,CURL,ON
/CPLANE,1
WPSTYLE,,,,,,,,0
GPLOT
WPSTYLE,,,,,,,,1
/PREP7
WPCSYS,-1
/RGB,INDEX,100,100,100, 0
/RGB,INDEX, 80, 80, 80,13
/RGB,INDEX, 60, 60, 60,14
/RGB,INDEX, 0, 0, 0,15
LCLEAR,     416
GPLOT
/GTYPE,1,KEYP,0
/GTYPE,1,LINE,1
/GTYPE,1,AREA,0
/GTYPE,1,VOLU,0
/GTYPE,1,NODE,1
/GTYPE,1,ELEM,1
/GCMD,1
GPLOT
GPLOT
/GTYPE,1,KEYP,1
/GTYPE,1,LINE,1
/GTYPE,1,AREA,0
/GTYPE,1,VOLU,0
/GTYPE,1,NODE,0
/GTYPE,1,ELEM,0
/GCMD,1
GPLOT
/NUMBER,2
! /DEV,FONT,ENTITY,MENU
/dev,font,2,Courier*New,400,0,-11,0,0,,,
wprot,42.5,0,0
wprot,0,90,0
LSBW,     416
wprot,0,0,-0.3
LSBW,     342
LDELE,     416, , ,1
FLST,5,2,4,ORDE,2
FITEM,5,379
FITEM,5,2957
CM,_Y,LINE
LSEL, , , ,P51X
CM,_Y1,LINE
CMSEL,S,_Y
CMSEL,S,_Y1
LATT,1,1,1, , , ,
CMSEL,S,_Y
CMDELE,_Y
CMDELE,_Y1
FLST,5,2,4,ORDE,2
FITEM,5,379
FITEM,5,2957
CM,_Y,LINE
LSEL, , , ,P51X
CM,_Y1,LINE
CMSEL,S,_Y
FLST,5,2,4,ORDE,2
FITEM,5,379
FITEM,5,2957
CM,_Y,LINE
LSEL, , , ,P51X
CM,_Y1,LINE
CMSEL,,_Y
LESIZE,_Y1, , ,1, , , , ,1
FLST,2,2,4,ORDE,2
FITEM,2,379
FITEM,2,2957
LMESH,P51X
/GTYPE,1,KEYP,0
/GTYPE,1,LINE,0
/GTYPE,1,AREA,0
/GTYPE,1,VOLU,0
/GTYPE,1,NODE,1
/GTYPE,1,ELEM,1
/GCMD,1
/NUMBER,2
ALLSEL,ALL
GPLOT
/NUMBER,2
/NUMBER,2
/PSF,DEFA, ,1,0,1
/PBF,DEFA, ,1
/PSYMB,CS,0
/PSYMB,NDIR,0
/PSYMB,ESYS,0
/PSYMB,LDIV,0
/PSYMB,LDIR,0
/PSYMB,ADIR,0
/PSYMB,ECON,0
/PSYMB,XNODE,0
/PSYMB,DOT,1
/PSYMB,PCONV,
/PSYMB,LAYR,0
/PSYMB,FBCS,0
/PBC,U, ,1,,,,
/PBC,ROT, ,1,,,,
/PBC,F, ,2,,,,
/PBC,M, ,0,,,,
/PBC,NFOR, ,0,,,,
/PBC,NMOM, ,0,,,,
/PBC,RFOR, ,0,,,,
/PBC,RMOM, ,0,,,,
/PBC,PATH, ,0,,,,
FINISH
/SOL
/STATUS,SOLU
SOLVE
FINISH
/POST1
ETABLE,REFL
/EFACET,1
PLNSOL, U,Y, 0,1.0
/NUMBER,0
/EFACET,1
PLNSOL, U,SUM, 0,1.0
LSEL,S,LOC,Y,0,90
ALLSEL,BELOW,LINE
/EFACET,1
PLNSOL, U,Y, 0,1.0
/NUMBER,0
PLLS,LS1,LS6,1,0,0
/NUMBER,2
/NUMBER,2
/NUMBER,2
PLLS,LS1,LS6,0.3,0,0
PLLS,LS2,LS7,0.3,0,0
PLLS,LS2,LS7,0.5,0,0
PLLS,LS2,LS7,0.4,0,0
PLLS,LS2,LS7,0.3,0,0
PLLS,LS2,LS7,0.4,0,0
PLLS,LS2,LS7,0.3,0,0
PLLS,LS4,LS9,0.3,0,0
PLLS,SMIS4,SMIS10,0.3,0,0
SAVE
PRETAB,LS1,LS2,LS7,LS4,LS9,SMIS4
GPLOT
/EFACET,1
PLNSOL, U,Y, 0,1.0
/NUMBER,2
/NUMBER,0
! /DEV,FONT,ENTITY,MENU
/dev,font,2,Courier*New,400,0,-13,0,0,,,
! /DEV,FONT,ENTITY,MENU
/dev,font,2,Courier*New,400,0,-19,0,0,,,
GPLOT
RSYS,0
AVPRIN,0
AVRES,2,
/EFACET,1
LAYER,0
FORCE,TOTAL
/EFACET,1
PLNSOL, U,Y, 0,1.0
GPLOT
PRNSOL,U,X
PRNSOL,U,Y
RSYS,1
AVPRIN,0
AVRES,2,
/EFACET,1
LAYER,0
FORCE,TOTAL
/EFACET,1
PLNSOL, U,Y, 0,1.0
PRNSOL,U,Y
GPLOT
/NUMBER,2
SAVE
FINISH
! /EXIT,NOSAV
/BATCH
/COM,ANSYS RELEASE 2020 R1           BUILD 20.1      UP20191203       15:51:12
/input,menust,tmp,''
/COM,ANSYS RELEASE 2020 R1           BUILD 20.1      UP20191203       15:51:12
/GST,ON
/PLO,INFO,3
/GRO,CURL,ON
/CPLANE,1
WPSTYLE,,,,,,,,0
/RGB,INDEX,100,100,100, 0
/RGB,INDEX, 80, 80, 80,13
/RGB,INDEX, 60, 60, 60,14
/RGB,INDEX, 0, 0, 0,15
GPLOT
/NUMBER,2
/POST1
/NUMBER,0
/EFACET,1
PLNSOL, U,Y, 0,1.0
FINISH
! /EXIT,NOSAV
