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/BATCH
/COM,ANSYS RELEASE 2020 R1           BUILD 20.1      UP20191203       13:42:01
/input,menust,tmp,''
/COM,ANSYS RELEASE 2020 R1           BUILD 20.1      UP20191203       13:42:01
/GST,ON
/PLO,INFO,3
/GRO,CURL,ON
/CPLANE,1
WPSTYLE,,,,,,,,0
GPLOT
WPSTYLE,,,,,,,,1
wprot,68,0,0
wprot,0,90,0
/PLOPTS,INFO,3
/PLOPTS,LEG1,1
/PLOPTS,LEG2,1
/PLOPTS,LEG3,1
/PLOPTS,FRAME,1
/PLOPTS,TITLE,1
/PLOPTS,MINM,1
/PLOPTS,FILE,0
/PLOPTS,SPNO,0
/PLOPTS,LOGO,1
/PLOPTS,WINS,1
/PLOPTS,WP,0
/PLOPTS,DATE,0
/PREP7
LCLEAR,     384
LPLOT
/NUMBER,2
GPLOT
/GTYPE,1,KEYP,0
/GTYPE,1,LINE,1
/GTYPE,1,AREA,0
/GTYPE,1,VOLU,0
/GTYPE,1,NODE,1
/GTYPE,1,ELEM,1
/GCMD,1
GPLOT
/NUMBER,2
LSBW,     384
/GTYPE,1,KEYP,1
/GTYPE,1,LINE,1
/GTYPE,1,AREA,0
/GTYPE,1,VOLU,0
/GTYPE,1,NODE,1
/GTYPE,1,ELEM,1
/GCMD,1
GPLOT
/RGB,INDEX,100,100,100, 0
/RGB,INDEX, 80, 80, 80,13
/RGB,INDEX, 60, 60, 60,14
/RGB,INDEX, 0, 0, 0,15
wprot,0,0,-0.3
LSBW,    2953
LDELE,     384, , ,1
FLST,5,2,4,ORDE,2
FITEM,5,2954
FITEM,5,-2955
CM,_Y,LINE
LSEL, , , ,P51X
CM,_Y1,LINE
CMSEL,S,_Y
CMSEL,S,_Y1
LATT,1,20,1, , , ,
CMSEL,S,_Y
CMDELE,_Y
CMDELE,_Y1
elist,all,,,1,1
FLST,5,2,4,ORDE,2
FITEM,5,2954
FITEM,5,-2955
CM,_Y,LINE
LSEL, , , ,P51X
CM,_Y1,LINE
CMSEL,,_Y
LESIZE,_Y1, , ,1, , , , ,1
FLST,2,2,4,ORDE,2
FITEM,2,2954
FITEM,2,-2955
LMESH,P51X
elist,all,,,1,1
/PSF,DEFA, ,1,0,1
/PBF,DEFA, ,1
/PSYMB,CS,0
/PSYMB,NDIR,0
/PSYMB,ESYS,0
/PSYMB,LDIV,0
/PSYMB,LDIR,0
/PSYMB,ADIR,0
/PSYMB,ECON,0
/PSYMB,XNODE,0
/PSYMB,DOT,1
/PSYMB,PCONV,
/PSYMB,LAYR,0
/PSYMB,FBCS,0
/PBC,U, ,0,,,,
/PBC,ROT, ,0,,,,
/PBC,F, ,2,,,,
/PBC,M, ,0,,,,
/PBC,NFOR, ,0,,,,
/PBC,NMOM, ,0,,,,
/PBC,RFOR, ,0,,,,
/PBC,RMOM, ,0,,,,
/PBC,PATH, ,0,,,,
FLST,2,401,1,ORDE,24
FITEM,2,1
FITEM,2,-19
FITEM,2,40
FITEM,2,-148
FITEM,2,150
FITEM,2,-167
FITEM,2,169
FITEM,2,-186
FITEM,2,188
FITEM,2,-205
FITEM,2,207
FITEM,2,-224
FITEM,2,226
FITEM,2,-243
FITEM,2,245
FITEM,2,-262
FITEM,2,264
FITEM,2,-281
FITEM,2,283
FITEM,2,-300
FITEM,2,302
FITEM,2,-419
FITEM,2,1513
FITEM,2,-1523
NROTAT,P51X
FLST,2,2,1,ORDE,2
FITEM,2,1522
FITEM,2,-1523
/GO
F,P51X,FX,61
ALLSEL,ALL
FINISH
/SOL
/STATUS,SOLU
SOLVE
FINISH
/POST1
ETABLE,REFL
/EFACET,1
PLNSOL, U,SUM, 0,1.0
/NUMBER,0
PLLS,LS1,LS6,0.5,0,0
/NUMBER,2
LSEL,S,LOC,Y,0,90
ALLSEL,BELOW,LINE
PRETAB,LS1,LS2,LS7,LS4,LS9,SMIS4
SAVE
FINISH
! /EXIT,NOSAV
/BATCH
/COM,ANSYS RELEASE 2020 R1           BUILD 20.1      UP20191203       02:17:57
/input,menust,tmp,''
/COM,ANSYS RELEASE 2020 R1           BUILD 20.1      UP20191203       02:17:57
/GST,ON
/PLO,INFO,3
/GRO,CURL,ON
/CPLANE,1
WPSTYLE,,,,,,,,0
/PSF,DEFA, ,1,0,1
/PBF,DEFA, ,1
/PSYMB,CS,0
/PSYMB,NDIR,0
/PSYMB,ESYS,0
/PSYMB,LDIV,0
/PSYMB,LDIR,0
/PSYMB,ADIR,0
/PSYMB,ECON,0
/PSYMB,XNODE,0
/PSYMB,DOT,1
/PSYMB,PCONV,
/PSYMB,LAYR,0
/PSYMB,FBCS,0
/PBC,ALL, ,1
ALLSEL,ALL
/RGB,INDEX,100,100,100, 0
/RGB,INDEX, 80, 80, 80,13
/RGB,INDEX, 60, 60, 60,14
/RGB,INDEX, 0, 0, 0,15
GPLOT
/PSF,DEFA, ,1,0,1
/PBF,DEFA, ,1
/PSYMB,CS,0
/PSYMB,NDIR,0
/PSYMB,ESYS,0
/PSYMB,LDIV,0
/PSYMB,LDIR,0
/PSYMB,ADIR,0
/PSYMB,ECON,0
/PSYMB,XNODE,0
/PSYMB,DOT,1
/PSYMB,PCONV,
/PSYMB,LAYR,0
/PSYMB,FBCS,0
/PBC,U, ,0,,,,
/PBC,ROT, ,0,,,,
/PBC,F, ,1,,,,
/PBC,M, ,0,,,,
/PBC,NFOR, ,0,,,,
/PBC,NMOM, ,0,,,,
/PBC,RFOR, ,0,,,,
/PBC,RMOM, ,0,,,,
/PBC,PATH, ,1,,,,
/PREP7
FLST,2,2,1,ORDE,2
FITEM,2,1522
FITEM,2,-1523
FDELE,P51X,ALL
FINISH
/SOL
/STATUS,SOLU
SOLVE
FINISH
/POST1
ETABLE,REFL
LSEL,S,LOC,Y,0,90
ALLSEL,BELOW,LINE
PRETAB,LS1,LS2,LS7,LS4,LS9,SMIS4
/PSF,DEFA, ,1,0,1
/PBF,DEFA, ,1
/PSYMB,CS,0
/PSYMB,NDIR,0
/PSYMB,ESYS,0
/PSYMB,LDIV,0
/PSYMB,LDIR,0
/PSYMB,ADIR,0
/PSYMB,ECON,0
/PSYMB,XNODE,0
/PSYMB,DOT,1
/PSYMB,PCONV,
/PSYMB,LAYR,0
/PSYMB,FBCS,0
/PBC,U, ,0,,,,
/PBC,ROT, ,0,,,,
/PBC,F, ,1,,,,
/PBC,M, ,0,,,,
/PBC,NFOR, ,0,,,,
/PBC,NMOM, ,0,,,,
/PBC,RFOR, ,0,,,,
/PBC,RMOM, ,0,,,,
/PBC,PATH, ,0,,,,
SAVE
FINISH
! /EXIT,NOSAV
